*Heading
** Job name: gear-B Model name: gear-B
** Generated by: Abaqus/CAE 2018
*Preprint, echo=NO, model=NO, history=NO, contact=NO
**
** PARTS
**
*Part, name=Part-2
*Node
      1,   1.96287608, -0.098846212,           0.
      2,   1.97149479, -0.197357953,           0.
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*Element, type=C3D8,elset=ALL
   1,  4388,  8891,  4097,  4118, 14574, 19077, 14283, 14304
   2,   715,  4093,  4655,  4670, 10901, 14279, 14841, 14856
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*Node
  20373,   3.66000009,           0., 0.0500000007
*Nset, nset=Part-2-RefPt_, internal
20373,
*Nset, nset=RP
 20373,
*Nset, nset=inner
     1,     2,     3,     4,     5,     6
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*Elset, elset=inner
   13,   96,  121,  136,  144,  167
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*Nset, nset=boundary
   100,   101,   102,   103,   104,   105
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*Elset, elset=outer
    3,    4,    5,    6,   20,   22
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*Nset, nset=bulk, generate
     1,  20373,      1
*Elset, elset=bulk, generate
    1,  9582,     1
*Elset, elset=_inner_S3, internal
   13,  136,  167,  262,  345,  367
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*Elset, elset=_inner_S5, internal
   96,  144,  264,  346,  402,  421
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*Elset, elset=_inner_S4, internal
  121,  347,  358,  420,  425,  474
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*Elset, elset=_inner_S6, internal
  172,  263,  365,  415,  419,  424
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*Surface, type=ELEMENT, name=inner
_inner_S3, S3
_inner_S5, S5
_inner_S4, S4
_inner_S6, S6
*Elset, elset=_outer_S4, internal
    5,   26,   71,  140,  150,  151
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*Elset, elset=_outer_S6, internal
    6,   20,   22,   25,   70,   72
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*Elset, elset=_outer_S5, internal
    3,  108,  109,  110,  113,  182
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*Elset, elset=_outer_S3, internal
    4,  111,  112,  183,  184,  185
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*Surface, type=ELEMENT, name=outer
_outer_S4, S4
_outer_S6, S6
_outer_S5, S5
_outer_S3, S3
** Section: Section-1
*Solid Section, elset=bulk, material=Material-1
,
*End Part
**
**
** ASSEMBLY
**
*Assembly, name=Assembly
**
*Instance, name=Part-2-1, part=Part-2
*End Instance
**
*End Assembly
**
** MATERIALS
**
*Material, name=Material-1
*Density
 7.85e-09,
*Elastic
210000., 0.3
