*Heading
** Job name: SUBSTRATE1 Model name: substrate
** Generated by: Abaqus/CAE 2018
*Preprint, echo=NO, model=NO, history=NO, contact=NO
**
** PARTS
**
*Part, name=substrate
*Node
      1,           2.,  0.449999988,           0.
      2,           2.,  0.449999988,          0.5
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*Element, type=C3D8,elset=ALL
    1,   322,  1755,  9129,   963,     1,    13,   771,    68
    2,  1755,  1756,  9130,  9129,    13,    14,   772,   771
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*Nset, nset=refine
     1,     2,     5,     8,     9,    10
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*Elset, elset=refine, generate
 12501,  17500,      1
*Nset, nset=boundary
    9,   10,   11,   12,  522,  523
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*Elset, elset=top
 12526, 12527, 12528, 12529, 12530, 12531
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*Nset, nset=bottom
    3,    4,    6,    7,   41,   42
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*Elset, elset=bottom
   101,   102,   103,   104,   105,   106
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*Nset, nset=symmetry
    2,    3,    5,    6,   10,   12
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*Elset, elset=symmetry
    25,    50,    75,   100,   125,   150
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*Nset, nset=bulk, generate
     1,  21008,      1
*Elset, elset=bulk, generate
     1,  17500,      1
** Section: Section-1
*Solid Section, elset=bulk, material=Material-1
,
*End Part
**
**
** ASSEMBLY
**
*Assembly, name=Assembly
**
*Instance, name=substrate-1, part=substrate
*End Instance
**
*End Assembly
**
** MATERIALS
**
*Material, name=Material-1
*Elastic
 8.94e-06, 0.31
*Plastic, hardening=JOHNSON COOK
 0.145,   0.,   0.,   0.,1600.,   0.
